<?xml version="1.0"?>

<flight_control name="FCS">

  <channel name="Pitch">

    <aerosurface_scale name="pitch-trim-cmd-deg">
      <input>fcs/pitch-trim-cmd-norm</input>
      <range>
        <min> -5 </min>
        <max>  4 </max>
      </range>
    </aerosurface_scale>

    <actuator name="pitch-trim-act">
      <input>fcs/pitch-trim-cmd-deg</input>
      <clipto>
         <min> -5 </min>
         <max>  4 </max>
      </clipto>
    </actuator>

    <aerosurface_scale name="elevator-cmd-deg">
      <input>fcs/elevator-cmd-norm</input>
      <range>
        <min> -20 </min>
        <max>  17 </max>
      </range>
    </aerosurface_scale>

    <actuator name="elevator-act">
      <input>fcs/elevator-cmd-deg</input>
      <clipto>
        <min> -20 </min>
        <max>  17 </max>
      </clipto>
    </actuator>

    <summer name="elevator-pos-deg">
      <input>fcs/pitch-trim-act</input>
      <input>fcs/elevator-act</input>
      <clipto>
        <min> -20 </min>
        <max>  17 </max>
      </clipto>
    </summer>

    <aerosurface_scale name="elevator-pos-norm">
      <input>fcs/elevator-pos-deg</input>
      <domain>
        <min> -20 </min>
        <max>  17 </max>
      </domain>
      <range>
        <min> -1 </min>
        <max>  1 </max>
      </range>
    </aerosurface_scale>

  </channel>


  <channel name="Roll">

    <fcs_function name="aileron-limit-deg">
      <function>
        <table>
          <independentVar>gear/gear-pos-norm</independentVar>
          <tableData>
            0 10
            1 20
          </tableData>
        </table>
      </function>
    </fcs_function>

    <aerosurface_scale name="roll-trim-cmd-deg">
      <input>fcs/roll-trim-cmd-norm</input>
      <range>
        <min> -5 </min>
        <max>  5 </max>
      </range>
    </aerosurface_scale>

    <actuator name="roll-trim-act">
      <input>fcs/roll-trim-cmd-deg</input>
      <clipto>
         <min> -5 </min>
         <max>  5 </max>
      </clipto>
    </actuator>

    <aerosurface_scale name="roll-cmd-deg">
      <input>fcs/aileron-cmd-norm</input>
      <range>
        <min> -20 </min>
        <max>  20 </max>
      </range>
      <clipto>
        <min>-fcs/aileron-limit-deg</min>
        <max>fcs/aileron-limit-deg</max>
      </clipto>
    </aerosurface_scale>

  <!--left aileron-->

    <actuator name="left-aileron-act">
      <input>fcs/roll-cmd-deg</input>
      <clipto>
        <min> -20 </min>
        <max>  20 </max>
      </clipto>
    </actuator>

    <summer name="left-aileron-pos-deg">
      <input>fcs/roll-trim-act</input>
      <input>fcs/left-aileron-act</input>
      <clipto>
        <min> -20 </min>
        <max>  20 </max>
      </clipto>
    </summer>

    <aerosurface_scale name="left-aileron-pos-norm">
      <input>fcs/left-aileron-pos-deg</input>
      <domain>
        <min> -20 </min>
        <max>  20 </max>
      </domain>
      <range>
        <min> -1 </min>
        <max>  1 </max>
      </range>
    </aerosurface_scale>

  <!--right aileron-->

    <actuator name="right-aileron-act">
      <input>fcs/roll-cmd-deg</input>
      <clipto>
        <min> -20 </min>
        <max>  20 </max>
      </clipto>
    </actuator>

    <summer name="right-aileron-pos-deg">
      <input>fcs/roll-trim-act</input>
      <input>fcs/right-aileron-act</input>
      <clipto>
        <min> -20 </min>
        <max>  20 </max>
      </clipto>
    </summer>

    <aerosurface_scale name="right-aileron-pos-norm">
      <input>fcs/right-aileron-pos-deg</input>
      <domain>
        <min> -20 </min>
        <max>  20 </max>
      </domain>
      <range>
        <min> -1 </min>
        <max>  1 </max>
      </range>
    </aerosurface_scale>

  </channel>


  <channel name="Yaw">

   <summer name="Rudder Command Sum">
      <input>fcs/rudder-cmd-norm</input>
      <input>fcs/yaw-trim-cmd-norm</input>
      <clipto>
        <min> -1.0 </min>
        <max>  1.0 </max>
      </clipto>
   </summer>

<!--yaw damper-->

   <scheduled_gain name="Yaw Damper Rate">
      <input>velocities/r-aero-rad_sec</input>
      <table>
        <independentVar lookup="row">velocities/ve-kts</independentVar>
         <tableData>
            30     0.00
            60     2.00
         </tableData>
      </table>
   </scheduled_gain>

   <scheduled_gain name="Yaw Damper Beta">
      <input>aero/beta-rad</input>
      <table>
        <independentVar lookup="row">velocities/ve-kts</independentVar>
        <tableData>
           30     0.00
           60     0.00
        </tableData>
      </table>
   </scheduled_gain>

   <summer name="Yaw Damper Sum">
      <input>fcs/yaw-damper-beta</input>
      <input>fcs/yaw-damper-rate</input>
      <clipto>
        <min> -0.1 </min>
        <max>  0.1 </max>
      </clipto>
   </summer>

   <scheduled_gain name="Yaw Damper Final">
      <input>fcs/yaw-damper-sum</input>
      <table>
        <independentVar lookup="row">velocities/ve-kts</independentVar>
        <tableData>
           30         0.0
           31         1.0
        </tableData>
      </table>
   </scheduled_gain>

<!--rudder-->

   <summer name="Rudder Sum">
      <input>fcs/rudder-command-sum</input>
      <input>fcs/yaw-damper-final</input>
      <clipto>
        <min> -1 </min>
        <max>  1 </max>
      </clipto>
   </summer>

   <aerosurface_scale name="Rudder Control">
      <input>fcs/rudder-sum</input>
      <domain>
        <min>-1.0</min>
        <max> 1.0</max>
      </domain>
      <range>
        <min> -0.25 </min>
        <max>  0.25 </max>
      </range>
      <output>fcs/rudder-pos-rad</output>
   </aerosurface_scale>

	<scheduled_gain name="Rudder Scheduled Gain">
		<input>fcs/rudder-pos-rad</input>
		<table>
			<independentVar>gear/gear-cmd-norm</independentVar>
			<tableData>
			0.0   0.4615
			1.0   1.0
			</tableData>
		</table>
	</scheduled_gain>

   <aerosurface_scale name="Rudder Normalized">
      <input>fcs/rudder-pos-rad</input>
      <domain>
        <min>-0.25</min>
        <max> 0.25</max>
      </domain>
      <range>
        <min>-1</min>
        <max> 1</max>
      </range>
      <output>fcs/rudder-pos-norm</output>
   </aerosurface_scale>

  </channel>

</flight_control>
